*Heading
** Job name: Job-1 Model name: No delamination
** Generated by: Abaqus/CAE 2022
*Preprint, echo=NO, model=NO, history=NO, contact=NO
**
** PARTS
**
*Part, name=Part-1
*Node
      1, 0.0199999996,  0.200000003, 0.00104999996
      2, 0.0199999996,           0., 0.00104999996
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*Element, type=SC8R
   1,     1,    37,  3961,   472,     6,   671,  7742,   672
   2,    37,    38,  3962,  3961,   671,   670,  7743,  7742
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*Orientation, name=Ori-5
1., 0., 0., 0., 1., 0.
3, 0.
** Region: (CompositeLayup-1-5: Generated From Layup)
*Elset, elset=CompositeLayup-1-5, generate
    1,  4000,     1
** Section: CompositeLayup-1-5
*Shell Section, elset=CompositeLayup-1-5, composite, orientation=Ori-5, stack direction=3, layup=CompositeLayup-1
1., 3, Material-1, 0., Ply-2
*Orientation, name=Ori-2
1., 0., 0., 0., 1., 0.
3, 0.
** Region: (CompositeLayup-1-2: Generated From Layup)
*Elset, elset=CompositeLayup-1-2, generate
 4001,  8000,     1
** Section: CompositeLayup-1-2
*Shell Section, elset=CompositeLayup-1-2, composite, orientation=Ori-2, stack direction=3, layup=CompositeLayup-1
1., 3, Material-1, 90., Ply-3
*Orientation, name=Ori-6
1., 0., 0., 0., 1., 0.
3, 0.
** Region: (CompositeLayup-1-6: Generated From Layup)
*Elset, elset=CompositeLayup-1-6, generate
  8001,  12000,      1
** Section: CompositeLayup-1-6
*Shell Section, elset=CompositeLayup-1-6, composite, orientation=Ori-6, stack direction=3, layup=CompositeLayup-1
1., 3, Material-1, 0., Ply-4
*Orientation, name=Ori-3
1., 0., 0., 0., 1., 0.
3, 0.
** Region: (CompositeLayup-1-3: Generated From Layup)
*Elset, elset=CompositeLayup-1-3, generate
 12001,  16000,      1
** Section: CompositeLayup-1-3
*Shell Section, elset=CompositeLayup-1-3, composite, orientation=Ori-3, stack direction=3, layup=CompositeLayup-1
1., 3, Material-1, 0., Ply-5
*Orientation, name=Ori-7
1., 0., 0., 0., 1., 0.
3, 0.
** Region: (CompositeLayup-1-7: Generated From Layup)
*Elset, elset=CompositeLayup-1-7, generate
 16001,  20000,      1
** Section: CompositeLayup-1-7
*Shell Section, elset=CompositeLayup-1-7, composite, orientation=Ori-7, stack direction=3, layup=CompositeLayup-1
1., 3, Material-1, 90., Ply-6
*Orientation, name=Ori-4
1., 0., 0., 0., 1., 0.
3, 0.
** Region: (CompositeLayup-1-4: Generated From Layup)
*Elset, elset=CompositeLayup-1-4, generate
 20001,  24000,      1
** Section: CompositeLayup-1-4
*Shell Section, elset=CompositeLayup-1-4, composite, orientation=Ori-4, stack direction=3, layup=CompositeLayup-1
1., 3, Material-1, 0., Ply-7
*Orientation, name=Ori-8
1., 0., 0., 0., 1., 0.
3, 0.
** Region: (CompositeLayup-1-8: Generated From Layup)
*Elset, elset=CompositeLayup-1-8, generate
 24001,  28000,      1
** Section: CompositeLayup-1-8
*Shell Section, elset=CompositeLayup-1-8, composite, orientation=Ori-8, stack direction=3, layup=CompositeLayup-1
1., 3, Material-1, 90., Ply-8
*Orientation, name=Ori-1
1., 0., 0., 0., 1., 0.
3, 0.
** Region: (CompositeLayup-1-1: Generated From Layup)
*Elset, elset=CompositeLayup-1-1, generate
 28001,  32000,      1
** Section: CompositeLayup-1-1
*Shell Section, elset=CompositeLayup-1-1, composite, orientation=Ori-1, stack direction=3, layup=CompositeLayup-1
1., 3, Material-1, 90., Ply-1
*End Part
**
**
** ASSEMBLY
**
*Assembly, name=Assembly
**
*Instance, name=Part-1-1, part=Part-1
*End Instance
**
*Nset, nset=_PickedSet4, internal, instance=Part-1-1
    2,    3,    5,    8,   10,   11
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*Elset, elset=_PickedSet4, internal, instance=Part-1-1, generate
   200,  32000,    200
*End Assembly
**
** MATERIALS
**
*Material, name=Material-1
*Density
 1942.5,
*Elastic, type=LAMINA
 4.47e+10, 1.32e+10,      0.3,    5e+09,    5e+09,    5e+09
**
** BOUNDARY CONDITIONS
**
** Name: BC-1 Type: Symmetry/Antisymmetry/Encastre
*Boundary
_PickedSet4, ENCASTRE
** ----------------------------------------------------------------
**
** STEP: Step-1
**
*Step, name=Step-1, nlgeom=NO, perturbation
*Frequency, eigensolver=Lanczos, sim, acoustic coupling=on, normalization=mass
10, , , , ,
**
** OUTPUT REQUESTS
**
*Restart, write, frequency=0
**
** FIELD OUTPUT: F-Output-1
**
*Output, field, variable=PRESELECT
**
** HISTORY OUTPUT: H-Output-1
**
*Output, history, variable=PRESELECT
*End Step
